**
** Heading +++++++++++++++++++++++++++++++++++++++++++++++++
**
*Heading
Hash: SQ5nkzSL, Date: 01/18/2026, Unit system: MM_TON_S_C
**
** Nodes +++++++++++++++++++++++++++++++++++++++++++++++++++
**
*Node
1, 0.00000000E+000, 1.00100000E+000
2, 1.20000000E+001, 1.00100000E+000
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**
** Elements ++++++++++++++++++++++++++++++++++++++++++++++++
**
*Element, Type=CAX8R, Elset=Punch_
233, 485, 493, 502, 482, 510, 511, 512, 513
234, 479, 501, 493, 492, 514, 515, 516, 517
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*Element, Type=CAX8R, Elset=Blank_
277, 6, 62, 586, 389, 141, 823, 824, 393
278, 389, 586, 587, 388, 824, 825, 826, 392
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*Element, Type=CAX8R, Elset=Holder_
597, 1384, 409, 1386, 1381, 1390, 1391, 1392, 1393
598, 1380, 1383, 1389, 1379, 1394, 1395, 1396, 1397
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*Element, Type=CAX8R, Elset=Die_
615, 1440, 1454, 1457, 1442, 1471, 1472, 1473, 1474
616, 1453, 1435, 1468, 1424, 1475, 1476, 1477, 1478
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**
** Node sets +++++++++++++++++++++++++++++++++++++++++++++++
**
*Nset, Nset=PunchBottom
1, 2, 3, 19, 20, 21, 22, 23, 24, 25, 26, 27, 28
*Nset, Nset=PunchSide
3, 4, 29, 30, 31, 32
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*Nset, Nset=PunchTop
4, 5, 44, 45, 46, 47, 48, 49, 50
*Nset, Nset=BlankBottom
6, 7, 62, 63, 64, 65
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*Nset, Nset=BlankTop
8, 9, 228, 229, 230, 231
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*Nset, Nset=BlankOuter
7, 8, 221, 222, 223, 224, 225, 226, 227
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*Nset, Nset=Internal_Selection-1_Displacement_Rotation-1
4, 5, 44, 45, 46, 47, 48, 49, 50
*Nset, Nset=Internal_Selection-1_Fixed-1
12, 13, 408, 409, 410, 411, 412, 413, 414
*Nset, Nset=Internal_Selection-1_Fixed-2
16, 17, 448, 449, 450, 451, 452, 453, 454
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**
** Element sets ++++++++++++++++++++++++++++++++++++++++++++
**
*Elset, Elset=Surface11
233, 234, 235, 236, 237, 238
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*Elset, Elset=Surface21
277, 278, 279, 280, 281, 282
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*Elset, Elset=Surface31
597, 598, 599, 600, 601, 602
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*Elset, Elset=Surface41
615, 616, 617, 618, 619, 620
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*Elset, Elset=Punch
233, 234, 235, 236, 237, 238
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*Elset, Elset=Blank
277, 278, 279, 280, 281, 282
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*Elset, Elset=Internal_Selection-1_steel_rigid_body
Punch_,
Holder_,
Die_
*Elset, Elset=Internal_Selection-1_all
Blank_
*Elset, Elset=Internal-1_Internal_Selection-1_Contact_Punch_blank_Master_S5
248
*Elset, Elset=Internal-1_Internal_Selection-1_Contact_Punch_blank_Master_S6
248, 253, 255, 257, 259, 262
*Elset, Elset=Internal-1_Internal_Selection-1_Contact_Punch_blank_Master_S3
251, 261, 268, 273, 275, 276
*Elset, Elset=Internal-1_Internal_Selection-1_Contact_Punch_blank_Master_S4
256
*Elset, Elset=Internal-1_Internal_Selection-1_Contact_Punch_blank_Slave_S5
280, 284, 288, 292, 296, 300
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*Elset, Elset=Internal-1_Internal_Selection-1_Contact_Holder_blank_Master_S4
600
*Elset, Elset=Internal-1_Internal_Selection-1_Contact_Holder_blank_Master_S3
601, 602, 603, 610
*Elset, Elset=Internal-1_Internal_Selection-1_Contact_Holder_blank_Master_S6
605
*Elset, Elset=Internal-1_Internal_Selection-1_Contact_Holder_blank_Slave_S5
280, 284, 288, 292, 296, 300
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*Elset, Elset=Internal-1_Internal_Selection-1_Contact_Die_blank_Master_S6
635, 636, 637, 639, 642, 648, 649, 650, 654, 670
*Elset, Elset=Internal-1_Internal_Selection-1_Contact_Die_blank_Master_S5
640, 645
*Elset, Elset=Internal-1_Internal_Selection-1_Contact_Die_blank_Master_S3
643, 651, 652, 672
*Elset, Elset=Internal-1_Internal_Selection-1_Contact_Die_blank_Master_S4
647, 651
*Elset, Elset=Internal-1_Internal_Selection-1_Contact_Die_blank_Slave_S3
277, 281, 285, 289, 293, 297
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**
** Surfaces ++++++++++++++++++++++++++++++++++++++++++++++++
**
*Surface, Name=Internal_Selection-1_Contact_Punch_blank_Master, Type=Element
Internal-1_Internal_Selection-1_Contact_Punch_blank_Master_S5, S3
Internal-1_Internal_Selection-1_Contact_Punch_blank_Master_S6, S4
Internal-1_Internal_Selection-1_Contact_Punch_blank_Master_S3, S1
Internal-1_Internal_Selection-1_Contact_Punch_blank_Master_S4, S2
*Surface, Name=Internal_Selection-1_Contact_Punch_blank_Slave, Type=Element
Internal-1_Internal_Selection-1_Contact_Punch_blank_Slave_S5, S3
*Surface, Name=Internal_Selection-1_Contact_Holder_blank_Master, Type=Element
Internal-1_Internal_Selection-1_Contact_Holder_blank_Master_S4, S2
Internal-1_Internal_Selection-1_Contact_Holder_blank_Master_S3, S1
Internal-1_Internal_Selection-1_Contact_Holder_blank_Master_S6, S4
*Surface, Name=Internal_Selection-1_Contact_Holder_blank_Slave, Type=Element
Internal-1_Internal_Selection-1_Contact_Holder_blank_Slave_S5, S3
*Surface, Name=Internal_Selection-1_Contact_Die_blank_Master, Type=Element
Internal-1_Internal_Selection-1_Contact_Die_blank_Master_S6, S4
Internal-1_Internal_Selection-1_Contact_Die_blank_Master_S5, S3
Internal-1_Internal_Selection-1_Contact_Die_blank_Master_S3, S1
Internal-1_Internal_Selection-1_Contact_Die_blank_Master_S4, S2
*Surface, Name=Internal_Selection-1_Contact_Die_blank_Slave, Type=Element
Internal-1_Internal_Selection-1_Contact_Die_blank_Slave_S3, S1
**
** Physical constants ++++++++++++++++++++++++++++++++++++++
**
**
** Coordinate systems ++++++++++++++++++++++++++++++++++++++
**
**
** Materials +++++++++++++++++++++++++++++++++++++++++++++++
**
*Material, Name=S185
*Density
7.8E-09
*Elastic
210000, 0.28
*Expansion, Zero=20
1.1E-05
*Conductivity
14
*Specific heat
440000000
*Material, Name=1060_Alloy
*Density
2.7E-09
*Elastic69000, 0.33
*Expansion, Zero=20
2.4E-05
*Conductivity
200
*Specific heat
900000000
*Plastic
30, 0
35, 0.02
40, 0.06
45, 0.12
50, 0.2
60, 0.3
70, 0.4
**
** Sections ++++++++++++++++++++++++++++++++++++++++++++++++
**
*Solid section, Elset=Internal_Selection-1_steel_rigid_body, Material=S185
1
*Solid section, Elset=Internal_Selection-1_all, Material=1060_Alloy
1
**
** Pre-tension sections ++++++++++++++++++++++++++++++++++++
**
**
** Constraints +++++++++++++++++++++++++++++++++++++++++++++
**
**
** Surface interactions ++++++++++++++++++++++++++++++++++++
**
*Surface interaction, Name=Surface_Interaction-1
*Surface behavior, Pressure-overclosure=Linear
1000, 1000
*Friction
0.03
**
** Contact pairs +++++++++++++++++++++++++++++++++++++++++++
**
*Contact pair, Interaction=Surface_Interaction-1, Type=Surface to surface, Adjust=0.01
Internal_Selection-1_Contact_Punch_blank_Slave, Internal_Selection-1_Contact_Punch_blank_Master
*Contact pair, Interaction=Surface_Interaction-1, Type=Surface to surface, Adjust=0.1
Internal_Selection-1_Contact_Holder_blank_Slave, Internal_Selection-1_Contact_Holder_blank_Master
*Contact pair, Interaction=Surface_Interaction-1, Type=Surface to surface, Adjust=0.1
Internal_Selection-1_Contact_Die_blank_Slave, Internal_Selection-1_Contact_Die_blank_Master
**
** Amplitudes ++++++++++++++++++++++++++++++++++++++++++++++
**
**
** Initial conditions ++++++++++++++++++++++++++++++++++++++
**
**
** Steps +++++++++++++++++++++++++++++++++++++++++++++++++++
**
**
** Step-5mm ++++++++++++++++++++++++++++++++++++++++++++++++
**
*Step, Nlgeom, Inc=1000
*Static
0.001, 0.5, 1E-10, 0.01
**
** Controls ++++++++++++++++++++++++++++++++++++++++++++++++
**
**
** Output frequency ++++++++++++++++++++++++++++++++++++++++
**
**
** Boundary conditions +++++++++++++++++++++++++++++++++++++
**
*Boundary, op=New
** Name: Displacement_Rotation-1
*Boundary
Internal_Selection-1_Displacement_Rotation-1, 2, 2, -5
** Name: Fixed-1
*Boundary
Internal_Selection-1_Fixed-1, 1, 2, 0

** Name: Fixed-2
*Boundary
Internal_Selection-1_Fixed-2, 1, 2, 0

**
** Loads +++++++++++++++++++++++++++++++++++++++++++++++++++
**
*Cload, op=New
*Dload, op=New
**
** Defined fields ++++++++++++++++++++++++++++++++++++++++++
**
**
** History outputs +++++++++++++++++++++++++++++++++++++++++
**
**
** Field outputs +++++++++++++++++++++++++++++++++++++++++++
**
*Node file
RF, U
*El file
S, PHS, E, ME, PEEQ, NOE
**
** End step ++++++++++++++++++++++++++++++++++++++++++++++++
**
*End step
**
** Step-8mm ++++++++++++++++++++++++++++++++++++++++++++++++
**
*Step, Nlgeom, Inc=1000
*Static
0.001, 0.5, 1E-10, 0.01
**
** Controls ++++++++++++++++++++++++++++++++++++++++++++++++
**
**
** Output frequency ++++++++++++++++++++++++++++++++++++++++
**
**
** Boundary conditions +++++++++++++++++++++++++++++++++++++
**
*Boundary, op=New
** Name: Displacement_Rotation-1
*Boundary
Internal_Selection-1_Displacement_Rotation-1, 2, 2, -8
** Name: Fixed-1
*Boundary
Internal_Selection-1_Fixed-1, 1, 2, 0

** Name: Fixed-2
*Boundary
Internal_Selection-1_Fixed-2, 1, 2, 0

**
** Loads +++++++++++++++++++++++++++++++++++++++++++++++++++
**
*Cload, op=New
*Dload, op=New
**
** Defined fields ++++++++++++++++++++++++++++++++++++++++++
**
**
** History outputs +++++++++++++++++++++++++++++++++++++++++
**
**
** Field outputs +++++++++++++++++++++++++++++++++++++++++++
**
*Node file
RF, U
*El file
S, PHS, E, ME, PEEQ, NOE
**
** End step ++++++++++++++++++++++++++++++++++++++++++++++++
**
*End step
**
** Step-10mm +++++++++++++++++++++++++++++++++++++++++++++++
**
*Step, Nlgeom, Inc=1000
*Static
0.001, 1, 1E-10, 0.01
**
** Controls ++++++++++++++++++++++++++++++++++++++++++++++++
**
**
** Output frequency ++++++++++++++++++++++++++++++++++++++++
**
**
** Boundary conditions +++++++++++++++++++++++++++++++++++++
**
*Boundary, op=New
** Name: Displacement_Rotation-1
*Boundary
Internal_Selection-1_Displacement_Rotation-1, 2, 2, -10
** Name: Fixed-1
*Boundary
Internal_Selection-1_Fixed-1, 1, 2, 0

** Name: Fixed-2
*Boundary
Internal_Selection-1_Fixed-2, 1, 2, 0

**
** Loads +++++++++++++++++++++++++++++++++++++++++++++++++++
**
*Cload, op=New
*Dload, op=New
**
** Defined fields ++++++++++++++++++++++++++++++++++++++++++
**
**
** History outputs +++++++++++++++++++++++++++++++++++++++++
**
**
** Field outputs +++++++++++++++++++++++++++++++++++++++++++
**
*Node file
RF, U
*El file
S, PHS, E, ME, PEEQ, NOE
**
** End step ++++++++++++++++++++++++++++++++++++++++++++++++
**
*End step
**
** Step-17mm +++++++++++++++++++++++++++++++++++++++++++++++
**
*Step, Nlgeom, Inc=1000
*Static
0.001, 1.5, 1E-10, 0.01
**
** Controls ++++++++++++++++++++++++++++++++++++++++++++++++
**
**
** Output frequency ++++++++++++++++++++++++++++++++++++++++
**
**
** Boundary conditions +++++++++++++++++++++++++++++++++++++
**
*Boundary, op=New
** Name: Displacement_Rotation-1
*Boundary
Internal_Selection-1_Displacement_Rotation-1, 2, 2, -17
** Name: Fixed-1
*Boundary
Internal_Selection-1_Fixed-1, 1, 2, 0

** Name: Fixed-2
*Boundary
Internal_Selection-1_Fixed-2, 1, 2, 0

**
** Loads +++++++++++++++++++++++++++++++++++++++++++++++++++
**
*Cload, op=New
*Dload, op=New
**
** Defined fields ++++++++++++++++++++++++++++++++++++++++++
**
**
** History outputs +++++++++++++++++++++++++++++++++++++++++
**
**
** Field outputs +++++++++++++++++++++++++++++++++++++++++++
**
*Node file
RF, U
*El file
S, PHS, E, ME, PEEQ, NOE
**
** End step ++++++++++++++++++++++++++++++++++++++++++++++++
**
*End step
**
** Step-20mm +++++++++++++++++++++++++++++++++++++++++++++++
**
*Step, Nlgeom, Inc=1000
*Static
0.001, 2, 1E-10, 0.01
**
** Controls ++++++++++++++++++++++++++++++++++++++++++++++++
**
**
** Output frequency ++++++++++++++++++++++++++++++++++++++++
**
**
** Boundary conditions +++++++++++++++++++++++++++++++++++++
**
*Boundary, op=New
** Name: Displacement_Rotation-1
*Boundary
Internal_Selection-1_Displacement_Rotation-1, 2, 2, -20
** Name: Fixed-1
*Boundary
Internal_Selection-1_Fixed-1, 1, 2, 0

** Name: Fixed-2
*Boundary
Internal_Selection-1_Fixed-2, 1, 2, 0

**
** Loads +++++++++++++++++++++++++++++++++++++++++++++++++++
**
*Cload, op=New
*Dload, op=New
**
** Defined fields ++++++++++++++++++++++++++++++++++++++++++
**
**
** History outputs +++++++++++++++++++++++++++++++++++++++++
**
**
** Field outputs +++++++++++++++++++++++++++++++++++++++++++
**
*Node file
RF, U
*El file
S, PHS, E, ME, PEEQ, NOE
**
** End step ++++++++++++++++++++++++++++++++++++++++++++++++
**
*End step
**
** Step-17mm_upward ++++++++++++++++++++++++++++++++++++++++
**
*Step, Nlgeom, Inc=1000
*Static
0.001, 2, 1E-10, 0.01
**
** Controls ++++++++++++++++++++++++++++++++++++++++++++++++
**
**
** Output frequency ++++++++++++++++++++++++++++++++++++++++
**
**
** Boundary conditions +++++++++++++++++++++++++++++++++++++
**
*Boundary, op=New
** Name: Displacement_Rotation-1
*Boundary
Internal_Selection-1_Displacement_Rotation-1, 2, 2, -17
** Name: Fixed-1
*Boundary
Internal_Selection-1_Fixed-1, 1, 2, 0

** Name: Fixed-2
*Boundary
Internal_Selection-1_Fixed-2, 1, 2, 0

**
** Loads +++++++++++++++++++++++++++++++++++++++++++++++++++
**
*Cload, op=New
*Dload, op=New
**
** Defined fields ++++++++++++++++++++++++++++++++++++++++++
**
**
** History outputs +++++++++++++++++++++++++++++++++++++++++
**
**
** Field outputs +++++++++++++++++++++++++++++++++++++++++++
**
*Node file
RF, U
*El file
S, PHS, E, ME, PEEQ, NOE
**
** End step ++++++++++++++++++++++++++++++++++++++++++++++++
**
*End step
