** Model source:
** https://calculix.discourse.group/t/nonlinear-axial-compression-buckling-of-a-cylinder-not-converging/4027
**
** Adding some plasticity vs. the original model file.
** 2nd set of steel plasticity data added to verify the convergence stability vs. the plasticity data
**
*Heading
nonlinear buckling analysis, skirt with openings and holes under load, shell mesh
*NODE, NSET=Nall
       1,-2.850137002300e+02,1.605356920385e+03,-4.128862000909e+02
       2,2.595797405578e+02,1.565697798845e+03,-4.065920599061e+02
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*ELEMENT, TYPE=S8, ELSET=Eall
    81,    154,    486,    114,     10,    526,    527,    116,    194
    82,    114,    486,     73,      9,    527,    528,    113,    115
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** Names based on base_plate_center_YFIX
*NSET,NSET=Nbase_plate_center_YFIX
9,
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** Names based on skir_sless_top_LOAD
*NSET,NSET=Nskir_sless_top_LOAD
13,
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**
*BOUNDARY
Nbase_plate_center_YFIX,1,3

*MATERIAL,NAME=STEEL
*ELASTIC
210000,0.3
** Plasticity source: https://github.com/calculix/CalculiX-Examples/blob/master/Kasten/Kasten.inp
*PLASTIC
** Mises stress, equivalent plastic strain:
100.,0.
200.,0.3
300.,1.
*DENSITY
7.8E-9
**
**********************************************************************************
** Metric unit: mm2, N
** Steel
**
** Youngs modulus 209000 MPa = 209000 N/mm2 = 2.09E+05 N/mm2 = 2.09E+08 mN/mm2
**
** Data source is Calculix Forum: https://calculix.discourse.group/t/error-increment-size-smaller-than-minimum/199
**
**********************************************************************************
*MATERIAL, NAME=steel2
*ELASTIC
2.09000000e+05, 2.80000000e-01
*PLASTIC
1.99000000e+02, 0.00000000e+00
2.11000000e+02, 5.80000000e-04
2.23000000e+02, 1.45000000e-03
2.35000000e+02, 2.70000000e-03
2.47000000e+02, 4.48000000e-03
2.59000000e+02, 6.97000000e-03
2.71000000e+02, 1.04000000e-02
2.83000000e+02, 1.50400000e-02
2.95000000e+02, 2.12600000e-02
4.40000000e+02, 5.09830000e-01
*DENSITY
7.8E-9
*SHELL SECTION, ELSET=Eall, MATERIAL=STEEL2
25.
**
****step 1, nonlinear displacement control buckling analysis
*STEP,NLGEOM,INC=10000
*STATIC
0.02,1,1e-5,0.1
*BOUNDARY
Nskir_sless_top_LOAD,3,3,100.
*NODE FILE, OUTPUT=2D
U
*EL FILE
S,E, PEEQ
*NODE PRINT, NSET=Nskir_sless_top_LOAD
U
*NODE PRINT, NSET=Nbase_plate_center_YFIX, TOTALS=ONLY
RF
*END STEP
